# AguaClara Water Treatment Plants
# Automated Design
# User Inputs:
# Design References
# [reference: UserInputs- 1m deep.xmcd]
# [reference: DesignAssumptions-1m deep.xmcd]
# [reference: MathFunctions.xmcd]
# [reference: PipeDatabase.xmcd]
# [reference: MinorLossCoefficients.xmcd]
# [reference: FluidsFunctions.xmcd]
# Inlet Channel:
# [reference: Inlet Channel.xmcd]
W_InletChannel = 0.320987 m
L_Channel = 3.6504 m
ND_SedPipeEntrance = 8 in
# Sedimentation Tanks:
# [reference: Sedimentation.xmcd]
H_SedBelowSlope = 0.6 m
H_SedBelowStraight = 0 m
H_SedAbove = 0.12 m
H_SedPlate = 0.48 m
HW_Sed = 1.2 m
H_Sed = 1.3 m
Z_Mp = 0.6 m
L_Sed = 2.64414 m
L_SedPlate = 0.554256 m
N_SedPlates = 56
AN_SedPlate = 60 deg
V_SedC = 9.95326 m/day
V_SedUp = 64.6632 m/day
# Sedimentation Tank Inlet Slopes:
# [reference: Sed. Inlet Slopes.xmcd]
B_SedInlet = 3.55126 cm
AN_SedTopInlet = 48.3629 deg
AN_SedBottom = 10 deg
A_SedInlet = 1349.36 cm^2
A_SedInletMin = 54.3382 cm^2
H_SedTopInlet = 0.6 m
H_SedBottom = 0.0940528 m
# Exit Channel:
# [reference: Exit Channel.xmcd]
W_ExitChannel =  # error: This variable is undefined.
H_ExitChannel = 0.7 m
L_ExitChannel = 3.6504 m
# Flow Controller:
# [reference: FCM.xmcd]
N_Fcm = 1
ID_FcmTube = 3.175 mm
ID_FcmTube = 0.125 in
L_FcmTube = 99.0625 cm
Q_FcmTubeMax = 285 mL/min
HL_FcmValve = 15.0907 cm
# Flocculator:
# [reference: Flocculation.xmcd]
W_FlocChannel = 0.5334 m
S_FlocBaffle = [0.0669468; 0.0821572; 0.136655; 0.334734] m
B_FlocBaffle = [0.0869468; 0.102157; 0.156655; 0.354734] m
N_FlocBafflesMin = 38
HL_Floc = 6.14702 cm
X_FlocBaffles =  # error
HW_FlocStart = 1.26147 m
W_FlocPort = 0.334734 m
L_FlocBaffles =  # error
H_FlocPort = 0.5334 m
N_FlocBaffles =  # error
Z_FlocBaffles =  # error
Gt_FlocMinFlow =  # error
# Entrance Tank:
# [reference: EntranceTank.xmcd]
ND_Lfom = 6 in
HL_Rm = 4.20427 cm
N_Lfom = 1
D_LfomOrifices = 18 mm
Q_LfomErrorMax = 1.15498 %
N_LfomOrifices = [5; 5; 3; 2; 2; 2; 1; 2; 2; 0]
L_Et = 1.04775 m
W_Et = 1.04775 m
HW_Et = 1.19826 m
H_Et = 1.29826 m
# Sedimentation Tank Effluent Launder:
# [reference: Launder.xmcd]
N_SedLaunderOrifices = 10
Q_SedLaunderOrifices = 12.6667 L/min
Z_SedLaunder = 1.14 m
ND_SedLaunder =  # error
D_SedLaunderOrifice =  # error
# Plant Leveling Tank:
# [reference: PlantLevelTank.xmcd]
HW_Plt = 0.5 m
ND_PltWeir = 0.1524 m
H_PltWeir = 0.462215 m
H_Plt = 0.7 m
W_Plt =  # error
# Sedimentation Tank Sludge Drain:
# [reference: SludgeDrain.xmcd]
N_SedSludgeOrifices =  # error
ND_SedSludge =  # error
Q_SludgeDrainInitial =  # error
D_SedSludgeOrifice =  # error
# Any additional needed elevations should be calculated in the files above.
# AutoCAD References
L_ChannelInlet := .5*W_Sed
W_ChannelInlet := .65*W_Channel
sedlayout := 3
H_Channel := .3 m
W_EChannel := W_Channel
L_Floc := L_Sed*N_FlocChannels
H_EChannel := H_Channel
T_EChannelWall := T_ChannelWall
H_Floc := H_Sed
baffle_amp := .5 in
baffle_thick := 4 mm
baffle_slope := 90 deg
baffle_width := W_FlocChannel
baffle_col := 1  # this is a constant!
baffle_periods := 8.5
baffle_y := 7 cm
baffle_num := 1
baffle_x := 4 in
# [reference: basics.xmcd]
# [reference: pipe.xmcd]
# [reference: tank.xmcd]
# [reference: lamina.xmcd]
# [reference: cross.xmcd]
# [reference: Tee.xmcd]
# [reference: elbow.xmcd]
# [reference: Sludge.xmcd]
# [reference: Channel.xmcd]
# [reference: Manifold.xmcd]
# [reference: SedTankslopes.xmcd]
# [reference: SedTank.xmcd]
# [component: inputs SedTank]
# [reference: floctank.xmcd]
# [component: inputs FlocTank]
# [reference: EntranceTank.xmcd]
# [reference: chemicalstock.xmcd]
# [reference: platform.xmcd]
# [reference: PlantLevelTank.xmcd]
