# AguaClara Design Tool
# [reference: BasicClientInputs.xmcd]
# [reference: ExpertClientInputs.xmcd]
# [reference: DesignAssumptions.xmcd]
# [reference: MathFunctions.xmcd]
# [reference: PipeDatabase.xmcd]
# [reference: MinorLossCoefficients.xmcd]
# [reference: FluidsFunctions.xmcd]
# [reference: Sedimentation Tank.xmcd]
# [reference: Floc Hopper.xmcd]
# [reference: FCM.xmcd]
# [reference: Flocculator 3.xmcd]
# [reference: RapidMixer.xmcd]
# [reference: Materials List.xmcd]
# [reference: EntranceTankDim.xmcd]
# [reference: AutoCADMasterProgram.xmcd]
# This file must have at least one variable displayed otherwise it doesn't recalculate and it claims that all variables are undefined.
H_SedFrameWall = 0.07 m
EN_DrillSeries = 0
EN_PipeSpec = 8
L_Sed = 11.52 m
EN_FcmTube = 0
AC_SedTank = [
    "_-view o t"; "-layer m tank"; "c t 132,132,132"; "tank"; "  "; "_-view o t _zoom w 0.16,-0.16,0 -11.68,1.16,1.79233 _box 0,0,0 -11.52,1,1.79233 _box 0.15,-0.15,-0.15 -11.67,1.15,1.79233 _subtract 0.15,-0.15,-0.15  0,0,0 "; "-layer s 0"; "  "; "-layer f tank"; "  "
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]
AC_FlocTank = [
    "-layer m floctank"; "c t 91,91,91"; "floctank"; "  "; "_-view o t _zoom w 0.16,3.29,0 -11.68,5.57825,1.98424 _box 0,3.45,0 -11.52,5.41825,1.98424 _box 0.15,3.3,-0.15 -11.67,5.56825,1.98424 _subtract 0.15,3.3,-0.15  0,3.45,0 "; "-layer s 0"; "  "; "-layer f floctank"; "  "; "-layer m floctankwall"
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]
AC_EntranceTank = [
    "-layer m entrancetank";
    "c t 214,214,214";
    "entrancetank";
    "  ";
    "_-view o t _zoom w 0.16,5.40825,0 -1.71538,7.28363,2.28424 _box 0,5.56825,0 -1.55538,7.12363,2.28424 _box 0.15,5.41825,-0.15 -1.70538,7.27363,2.28424 _subtract 0.15,5.41825,-0.15  0,5.56825,0 ";
    "-layer s 0";
    "  ";
    "-layer f entrancetank";
    "  ";
    "-layer s entrancetank";
    "  ";
    "_box -0.37286,5.41825,2.23424 0,5.56825,2.28424";
    "-layer s 0";
    "  ";
    "-layer t entrancetank";
    "  ";
    "_-view o t";
    "_subtract 0.15,5.56825,0  -0.37286,5.41825,2.23424 ";
    "-layer f entrancetank";
    "  "
]
